<?xml version="1.0" encoding="UTF-8"?>
<!--
  File:     Continental_TSIO-520-P.xml
  Author:   Dany93, TheEagle, S&J
  Inputs:
    name:           Continental_TSIO-520-P
    type:           piston
    power:          310 hp
-->

<piston_engine name="Continental_TSIO-520-P">

   <displacement unit="IN3"> 520.00 </displacement>
   <bore unit="IN">    5.25 </bore>
   <stroke unit="IN">  4.0 </stroke>
   <cylinders>         6.0  </cylinders>
   <compression-ratio>  7.5 </compression-ratio>
   <maxhp>        285.00 </maxhp>
   <cycles>         4.0 </cycles>
   <idlerpm>      600.0 </idlerpm>
   <maxrpm>      2600.0 </maxrpm>
   <starter-torque> 50.00 </starter-torque>
   <static-friction> 1.55 </static-friction>

   <ram-air-factor>0.1</ram-air-factor>
   <air-intake-impedance-factor> 0 </air-intake-impedance-factor>

   <maxmp unit="INHG">         28.8 </maxmp>
   <minmp unit="INHG">         14.7 </minmp>

      <boostmanual> 1 </boostmanual>
   <numboostspeeds>1</numboostspeeds>
   <boostoverride>0</boostoverride>
   <boost-loss-factor> 0 </boost-loss-factor>
   <ratedboost1 unit="INHG">5.08</ratedboost1>
   <ratedrpm1>2700</ratedrpm1>
   <ratedpower1>310</ratedpower1>
   <ratedaltitude1>17000</ratedaltitude1>

   <sparkfaildrop>  0.1 </sparkfaildrop>
   <volumetric-efficiency> 1.1 </volumetric-efficiency>
<!--    <bsfc unit="LBS/HP*HR"> 0.4978 </bsfc> -->

   <cylinder-head-mass unit="LBS"> 25.28 </cylinder-head-mass>
   <cooling-factor> 0.36 </cooling-factor>

</piston_engine>
